OpenVSP model (file version 5), 15 components.
Geometry view with OpenVSP parameter names; values to 6 digits, angles in degrees, lengths in the model's unit.
Overall bounding box: X_Min=0 X_Len=1.05 Y_Min=-0.703002 Y_Len=1.406 Z_Min=-0.174116 Z_Len=0.374116

Blank "ISR"
  location (X Y Z) 0 0 0, rotation 0 0 0

Fuselage "Fuselage_ISR", child of "ISR"
  location (X Y Z) 0 0 0, rotation 0 0 0
  bounding box size 1 0.15 0.1
  Design: Length=1
  cross sections:
    n  XLocPercent  YLocPercent  ZLocPercent  shape
    0  0            0            0            point
    1  0.25         0            0            ellipse Ellipse_Height=0.1 Ellipse_Width=0.15
    2  0.5          0            0            as above
    3  0.866667     0            0            ellipse Ellipse_Height=0.1 Ellipse_Width=0.07
    4  1            0            0            point

Wing "Wing_ISR", child of "ISR"
  location (X Y Z) 0.2 0 0.03, rotation 0 0 0
  symmetric about XZ
  bounding box size 0.464345 1.4 0.0488799
  totals: TotalSpan=1.4 TotalProjectedSpan=1.4 TotalChord=0.15 TotalArea=0.21 TotalAR=9.33333 MAC=0.168
  root: chord 0.24, twist 0, NACA 4-series Camber=0.04 CamberLoc=0.4 ThickChord=0.2
  sections:
    n  Span  Root_Chord  Tip_Chord  Area   Sweep  Sweep_Location  Dihedral  Twist  Twist_Location  tip airfoil
    1  0.7   0.24        0.06       0.105  30     0               0         0      0.25            NACA 4-series Camber=0 CamberLoc=0.2 ThickChord=0.1

Wing "HorizontalTail_ISR", child of "ISR"
  location (X Y Z) 0.75 0 0, rotation 0 0 0
  symmetric about XZ
  bounding box size 0.184338 0.5 0.0320124
  totals: TotalSpan=0.5 TotalProjectedSpan=0.5 TotalChord=0.1 TotalArea=0.05 TotalAR=5 MAC=0.112
  root: chord 0.16, twist 0, NACA 4-series Camber=0 CamberLoc=0.2 ThickChord=0.2
  sections:
    n  Span  Root_Chord  Tip_Chord  Area   Sweep  Sweep_Location  Dihedral  Twist  Twist_Location  tip airfoil
    1  0.25  0.16        0.04       0.025  30     0               0         0      0.25            NACA 4-series Camber=0 CamberLoc=0.2 ThickChord=0.1

Wing "VerticalTail_ISR", child of "ISR"
  location (X Y Z) 0.75 0 0, rotation 90 0 0
  bounding box size 0.16 0.0320124 0.2
  totals: TotalSpan=0.2 TotalProjectedSpan=0.2 TotalChord=0.1 TotalArea=0.02 TotalAR=2 MAC=0.112
  root: chord 0.16, twist 0, NACA 4-series Camber=0 CamberLoc=0.2 ThickChord=0.2
  sections:
    n  Span  Root_Chord  Tip_Chord  Area  Sweep  Sweep_Location  Dihedral  Twist  Twist_Location  tip airfoil
    1  0.2   0.16        0.04       0.02  30     0               0         0      0.25            NACA 4-series Camber=0 CamberLoc=0.2 ThickChord=0.1

Propeller "PropGeom", child of "ISR"
  location (X Y Z) 0.05 0 0, rotation 0 0 0
  bounding box size 0.0149091 0.235581 0.269564
  Design: Diameter=0.3 NumBlade=3 Beta34=20 UseBeta34Flag=1 Feather=0 Rotate=0 Precone=0 ReverseFlag=0 FoldAngle=0 PropMode=0 AF=151.538 CLi=0.538798 Chord=0.177656 Solidity=0.169649 ConstructXoC=0.5 FeatherAxisXoC=0.5 FeatherOffsetXoC=0
  cross sections:
    n  RadiusFrac  shape
    0  0.2         ellipse Ellipse_Height=0.006 Ellipse_Width=0.012
    1  0.4         NACA 16-series Chord=0.0249375 IdealCl=0.7 ThickChord=0.144074
    2  1           NACA 16-series Chord=0.0195 IdealCl=0.2 ThickChord=0.03
  Chord along r/R (cubic Bezier): 0.2: 0.08, 0.333333: 0.15, 0.466667: 0.2, 0.6: 0.2, 0.716667: 0.2, 0.833333: 0.2, 0.95: 0.2, 0.966667: 0.2, 0.983333: 0.2, 1: 0.13
  Twist along r/R (PCHIP): 0.2: 46.75, 0.75: 20, 1: 13
  Thick along r/R (cubic Bezier): 0.2: 0.5, 0.233333: 0.3, 0.266667: 0.225, 0.3: 0.2, 0.4: 0.125, 0.5: 0.115, 0.6: 0.1, 0.733333: 0.075, 0.866667: 0.055, 1: 0.03
  CLI along r/R (cubic Bezier): 0.2: 0, 0.266667: 0.7, 0.333333: 0.7, 0.4: 0.7, 0.466667: 0.7, 0.533333: 0.7, 0.6: 0.7, 0.733333: 0.7, 0.866667: 0.7, 1: 0.2

Wing "Winglets_ISR", child of "ISR"
  location (X Y Z) 0.604 0.7 0.03, rotation -90 0 0
  symmetric about XZ
  bounding box size 0.0702542 1.406 0.09
  totals: TotalSpan=0.18 TotalProjectedSpan=0.18 TotalChord=0.06 TotalArea=0.0108 TotalAR=3 MAC=0.06
  root: chord 0.06, twist 0, NACA 4-series Camber=0 CamberLoc=0.2 ThickChord=0.1
  sections:
    n  Span  Root_Chord  Tip_Chord  Area    Sweep  Sweep_Location  Dihedral  Twist  Twist_Location  tip airfoil
    1  0.09  0.06        0.06       0.0054  6.5    0               0         0      0.25            as above

Blank "Payload"
  location (X Y Z) 0 0 0, rotation 0 0 0

Fuselage "Fuselage_Payload", child of "Payload"
  location (X Y Z) 0.15 0 -0.06, rotation 0 0 0
  bounding box size 0.9 0.125 0.0825615
  Design: Length=0.9
  cross sections:
    n  XLocPercent  YLocPercent  ZLocPercent  shape
    0  0            0            0            point
    1  0.25         0            0            ellipse Ellipse_Height=0.08 Ellipse_Width=0.125
    2  0.5          0            0            as above
    3  0.75         0            0            as above
    4  1            0            0            point

Wing "Wing_Payload", child of "Payload"
  location (X Y Z) 0.737705 0 -0.06, rotation 0 0 0
  symmetric about XZ
  bounding box size 0.323429 1.4 0.0400156
  totals: TotalSpan=1.4 TotalProjectedSpan=1.4 TotalChord=0.13 TotalArea=0.182 TotalAR=10.7692 MAC=0.142564
  root: chord 0.2, twist 0, NACA 4-series Camber=0 CamberLoc=0.2 ThickChord=0.2
  sections:
    n  Span  Root_Chord  Tip_Chord  Area   Sweep  Sweep_Location  Dihedral  Twist  Twist_Location  tip airfoil
    1  0.7   0.2         0.06       0.091  -10    0               0         0      0.25            NACA 4-series Camber=0 CamberLoc=0.2 ThickChord=0.1

Wing "Canard_Payload", child of "Payload"
  location (X Y Z) 0.3 0 -0.05, rotation 0 0 0
  symmetric about XZ
  bounding box size 0.110603 0.3 0.0192075
  totals: TotalSpan=0.3 TotalProjectedSpan=0.3 TotalChord=0.06 TotalArea=0.018 TotalAR=5 MAC=0.0672
  root: chord 0.096, twist 0, NACA 4-series Camber=0 CamberLoc=0.2 ThickChord=0.2
  sections:
    n  Span  Root_Chord  Tip_Chord  Area   Sweep  Sweep_Location  Dihedral  Twist  Twist_Location  tip airfoil
    1  0.15  0.096       0.024      0.009  30     0               0         0      0.25            NACA 4-series Camber=0 CamberLoc=0.2 ThickChord=0.1

Propeller "PropGeom", child of "Payload"
  location (X Y Z) 1.02 0 -0.06, rotation 0 0 0
  bounding box size 0.012623 0.199459 0.228231
  Design: Diameter=0.254 NumBlade=3 Beta34=20 UseBeta34Flag=1 Feather=0 Rotate=0 Precone=0 ReverseFlag=0 FoldAngle=0 PropMode=0 AF=151.538 CLi=0.538798 Chord=0.177656 Solidity=0.169649 ConstructXoC=0.5 FeatherAxisXoC=0.5 FeatherOffsetXoC=0
  cross sections:
    n  RadiusFrac  shape
    0  0.2         ellipse Ellipse_Height=0.00508 Ellipse_Width=0.01016
    1  0.4         NACA 16-series Chord=0.0211138 IdealCl=0.7 ThickChord=0.144074
    2  1           NACA 16-series Chord=0.01651 IdealCl=0.2 ThickChord=0.03
  blade curves as in "PropGeom"

Wing "VerticalTail_Payload", child of "Payload"
  location (X Y Z) 0.75 0 -0.03, rotation 90 0 0
  bounding box size 0.130692 0.012007 0.12
  totals: TotalSpan=0.12 TotalProjectedSpan=0.12 TotalChord=0.075 TotalArea=0.009 TotalAR=1.6 MAC=0.084
  root: chord 0.12, twist 0, NACA 4-series Camber=0 CamberLoc=0.2 ThickChord=0.1
  sections:
    n  Span  Root_Chord  Tip_Chord  Area   Sweep  Sweep_Location  Dihedral  Twist  Twist_Location  tip airfoil
    1  0.12  0.12        0.03       0.009  40     0               0         0      0.25            as above

Fuselage "Payload_Payload", child of "Payload"
  location (X Y Z) 0.6 0.03 -0.0819672, rotation 0 0 0
  symmetric about XZ
  bounding box size 0.18 0.13 0.07
  Design: Length=0.18
  cross sections:
    n  XLocPercent  YLocPercent  ZLocPercent  shape
    0  0            0            0            point
    1  0.25         0            0            ellipse Ellipse_Height=0.07 Ellipse_Width=0.07
    2  0.75         0            0            as above
    3  1            0            0            point

Mesh "MeshGeom"
  location (X Y Z) 0 0 0, rotation 0 0 0
  bounding box size 1.05 1.4 0.3
  triangle mesh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

VSPAERO settings (reference component "Wing_ISR"): Sref=0.21 bref=1.4 cref=0.15 Xcg=0 Ycg=0 Zcg=0 AlphaStart=0 AlphaEnd=10 AlphaNpts=5 BetaStart=0 BetaEnd=0 BetaNpts=1 MachStart=0 MachEnd=0 MachNpts=1 ReCref=1e+07 Vinf=100 Rho=0.002377
